// COMSOL Multiphysics 5.3.1.275 model "aniso.mph"
// Outline of the model tree

Parameters
  x1 = 0.5
  x2 = 1.5
  a = 100  // diffusivite horizontale
  b = 1  // diffusivite verticale
  stepsize = 0.2

Functions
  pw1: Piecewise "SmoothStep"
    funcname = stepf
    pieces = 
      {x1-0.5*stepsize, x1+0.5*stepsize, -sin((x-x1)*pi/stepsize)}
      {x1+stepsize*0.5, x2-stepsize*0.5, -1}
      {x2-0.5*stepsize, x2+0.5*stepsize, sin((x-x2)*pi/stepsize)}
  pw2: Piecewise | pieces = {{0, 0.4, 1}, {0.4, 1, 0}}

Variables
  var1 "Variables 1"
    c = u2y/sqrt(u2x*u2x+u2y*u2y)
    s = u2x/sqrt(u2x*u2x+u2y*u2y)
    d11 = a*c*c+b*s*s  // D[1][1]
    d12 = c*s*(b-a)  // D[1][2] ou D[2][1]
    d22 = a*s*s+b*c*c  // D[2][2]
  var2 "flux_sur_surface" on boundaries 4
    q11 = -(d11*ux+d12*uy)
    q12 = -(d12*ux+d22*uy)
    q = sqrt(q11*q11+q12*q12)

Geometry
  geom1 "Géométrie 1" (2D, length unit m)
    pc1: ParametricCurve "Courbe paramétrée 1" | coord = {10*s, stepf(s)*0.25+0.75}
    ls1: LineSegment "Segment linéaire 1" | specify1 = coord; vertex1 = pc1(1) points 1; coord1 = {0, 1}; specify2 = coord
    ls2: LineSegment "Segment linéaire 2" | specify1 = coord; specify2 = coord; coord2 = {10, 0}
    ls3: LineSegment "Segment linéaire 3" | specify1 = coord; coord1 = {10, 0}; specify2 = coord; coord2 = {10, 1}
    csol1: ConvertToSolid "Convertir en solide 1" | input = ls1, ls2, ls3, pc1
    fin: Finalize "Constituer une union"

Physics
  lpeq: LaplaceEquation "Equation de Laplace" on all domains
    dependent variable u2
    leq1: LaplaceEquation "Equation de Laplace 1" (default)
    zflx1: ZeroFluxBoundary "Flux nul 1" (default)
    init1: init "Valeurs initiales 1" (default) | u2 = y
    dir1: DirichletBoundary "Condition de Dirichlet 1" on boundaries 2 | r = 0
    dir2: DirichletBoundary "Condition de Dirichlet 2" on boundaries 4 | r = 1
  poeq: PoissonEquation "Equation de Poisson" on all domains
    dependent variable u
    peq1: PoissonEquation "Equation de Poisson 1" (default) | f = 0; c = {a*c*c+b*s*s, c*s*(b-a), c*s*(b-a), a*s*s+b*c*c}
    zflx1: ZeroFluxBoundary "Flux nul 1" (default)
    init1: init "Valeurs initiales 1" (default)
    flux1: FluxBoundary "Flux ou source 1" on boundaries 4 | g = -0.5*(1-stepf(x/10))*(u-1)*10
    dir1: DirichletBoundary "Condition de Dirichlet 1" on boundaries 2 | r = 0
    cons1: Constraint "Contrainte 1" (disabled) on boundaries 4 | R = (1-stepf(x/10))*10000*(1-u)-q*0.5*(1+stepf(x/10))
    disc1: Discretization "Discrétisation 1"

Mesh
  mesh1 "Maillage 1"
    size: MeshSizeDefault "Taille" | hmax = 0.05; hauto = 1; custom = on
    ftri1: FreeTri "Free Triangular 1" on remaining entities

Studies
  std1 "Etude 1"
    stat: Stationary "Stationnaire"

Solver configurations
  sol1 "Solution 1" (study std1)
    v1: Variables "Dependent Variables 1"
    s1: Stationary "Stationary Solver 1"
      dDef: Direct
      fc1: FullyCoupled

Datasets
  dset1: Solution | solution = sol1
  edg1: Edge2D "Bord Haut" on boundaries 4 | data = dset1
  cln1: CutLine2D "Diagonal" | data = dset1; genpoints = {{0, 1}, {10, 0}}

Derived values
  int1: IntLine "Intégration sur ligne 1" on boundaries 4
    data = dset1
    table = tbl3
    expr = {dflux.u, ux*nx+uy*ny, }
    unit = {1, 1, }
    descr = {"Flux sur frontière, direction down", , }
    dataseries = integral
  int2: IntLine "Intégration sur ligne 2" on boundaries 2
    data = dset1
    table = tbl3
    expr = uy
    unit = 1
    descr = Gradient de u, composante y

Tables
  tbl1: Table
    // Intégration sur ligne 1 (dflux.u, ux*nx+uy*ny)
    Intégrale: Flux sur frontière, direction down (1) | Intégrale: ux*nx+uy*ny (1) | Gradient de u, composante y (1) | Intégrale: ux*nx+uy*ny (1)
    3.1398 | 3.1277 | 3.14003 | 3.1037
  tbl2: Table
    // Intégration sur ligne 1 (dflux.u, ux*nx+uy*ny)
    Intégrale: Flux sur frontière, direction down (1) | Intégrale: ux*nx+uy*ny (1) | Gradient de u, composante y (1)
    3.13976 | 3.1037 | 3.14137
  tbl3: Table
    // Intégration sur ligne 1 (dflux.u, ux*nx+uy*ny)
    Intégrale: Flux sur frontière, direction down (1) | Intégrale: ux*nx+uy*ny (1) | Gradient de u, composante y (1)
    3.13976 | 3.1037 | 3.14137

Plots
  pg1: PlotGroup2D "sonde_dom" | data = dset1
    surf1: Surface "temperature" | expr = u; descr = Dependent variable u
    con1: Contour "Isovaleurs temp" | expr = u; descr = Variable dépendante u
  pg2: PlotGroup1D "sonde_Bord_Haut" | data = edg1; xlabel = x
    lngr1: LineGraph "uy*ny+ux*nx" (disabled)
      data = edg1
      expr = uy*ny+ux*nx
      unit = 1/m
      xdata = expr
      xdataexpr = x
      legends = uy*ny+ux*nx
    lngr2: LineGraph "condlim" (disabled) on boundaries 2
      data = edg1
      expr = -0.5*(1-stepf(x/10))*(u-1)*10000
      xdata = expr
      xdataexpr = x
      legends = uy
    lngr3: LineGraph "dflux.u"
      data = edg1
      expr = dflux.u
      unit = 1/m
      descr = Flux sur frontière, direction down
      xdata = expr
      xdataexpr = x
      legends = dflux.u
    lngr4: LineGraph "q" (disabled) | data = edg1; expr = q; unit = 1/m; legends = -q
    lngr5: LineGraph "stepf" (disabled) | expr = (1-stepf(x/10))*0.5
  pg4: PlotGroup1D "sonde_diagonal" | data = cln1; xlabel = x
    lngr1: LineGraph "temperature" | expr = u; descr = Dependent variable u
  pg5: PlotGroup2D "coefficient_anisotrope" | data = dset1
    surf1: Surface "D11" | expr = d11; descr = D[1][1]
    surf2: Surface "D12&D21" | expr = d12; descr = D[1][2] ou D[2][1]
    surf3: Surface "D22" | expr = d22; descr = D[2][2]

Exports
  plot2: Plot "Plot_flux_bord_haut" | filename = comsol_flux_sur_surface_bord_haut.txt
  plot3: Plot "Plot_temperature_diagonal" | filename = comsol_temperature_sur_diagonal.txt